//
cd /Users/mcde601/src/opendss/test/
redirect IEEE13_CDPSM.dss
solve
cd /Users/mcde601/src/gridappsd/powergrid-models/blazegraph/test
export summary  IEEE13_s.csv
export voltages IEEE13_v.csv
export currents IEEE13_i.csv
export taps     IEEE13_t.csv
uuids ieee13_uuids.dat
export cim100 file=IEEE13.xml sub=IEEE13 subgeo=Small geo=IEEE fid=49AD8E07-3BF9-A4E2-CB8F-C3722F837B62 sid=6C62C905-6FC7-653D-9F1E-1340F974A587 sgrid=ABEB635F-729D-24BF-B8A4-E2EF268D8B9E rgnid=73C512BD-7249-4F50-50DA-D93849B89C43
export uuids ieee13_uuids.dat
//
cd /Users/mcde601/src/opendss/test/
redirect IEEE13_Assets.dss
solve
cd /Users/mcde601/src/gridappsd/powergrid-models/blazegraph/test
export summary  IEEE13_Assets_s.csv
export voltages IEEE13_Assets_v.csv
export currents IEEE13_Assets_i.csv
export taps     IEEE13_Assets_t.csv
uuids ieee13_assets_uuids.dat
export cim100 file=IEEE13_Assets.xml sub=IEEE13 subgeo=Small geo=IEEE fid=5B816B93-7A5F-B64C-8460-47C17D6E4B0F sid=6C62C905-6FC7-653D-9F1E-1340F974A587 sgrid=ABEB635F-729D-24BF-B8A4-E2EF268D8B9E rgnid=73C512BD-7249-4F50-50DA-D93849B89C43
export uuids ieee13_assets_uuids.dat
//
cd /Users/mcde601/src/opendss
redirect ./Distrib/IEEETestCases/37Bus/ieee37.dss
solve
cd /Users/mcde601/src/gridappsd/powergrid-models/blazegraph/test
export summary  IEEE37_s.csv
export voltages IEEE37_v.csv
export currents IEEE37_i.csv
export taps     IEEE37_t.csv
uuids ieee37_uuids.dat
export cim100 file=IEEE37.xml sub=IEEE37 subgeo=Small geo=IEEE fid=49003F52-A359-C2EA-10C4-F4ED3FD368CC sid=1A0B112A-9C7E-D629-E186-15C5E9148498 sgrid=ABEB635F-729D-24BF-B8A4-E2EF268D8B9E rgnid=73C512BD-7249-4F50-50DA-D93849B89C43
export uuids ieee37_uuids.dat
//
cd /Users/mcde601/src/opendss
redirect ./Distrib/IEEETestCases/8500-Node/Master.dss
set maxiterations=20
solve
cd /Users/mcde601/src/gridappsd/powergrid-models/blazegraph/test
export summary  IEEE8500_s.csv
export voltages IEEE8500_v.csv
export currents IEEE8500_i.csv
export taps     IEEE8500_t.csv
uuids ieee8500_uuids.dat
export cim100 file=IEEE8500.xml sub=IEEE8500 subgeo=Large geo=IEEE fid=4F76A5F9-271D-9EB8-5E31-AA362D86F2C3 sid=F1E8E479-5FA0-4BFF-8173-B375D25B0AA2 sgrid=A1170111-942A-6ABD-D325-C64886DC4D7D rgnid=73C512BD-7249-4F50-50DA-D93849B89C43
export uuids ieee8500_uuids.dat
//
cd /Users/mcde601/src/opendss/Distrib/IEEETestCases/
redirect ./123Bus/IEEE123Switches.dss
buscoords ./123Bus/buscoords.dat
set maxiterations=20
solve
cd /Users/mcde601/src/GRIDAPPSD/Powergrid-Models/blazegraph/test/
export summary  IEEE123_s.csv
export voltages IEEE123_v.csv
export currents IEEE123_i.csv
export taps     IEEE123_t.csv
uuids ieee123_uuids.dat
export cim100 file=IEEE123.xml sub=IEEE123 subgeo=Medium geo=IEEE fid=C1C3E687-6FFD-C753-582B-632A27E28507 sid=FE44B314-385E-C2BF-3983-3A10C6060022 sgrid=1CD7D2EE-3C91-3248-5662-A43EFEFAC224 rgnid=73C512BD-7249-4F50-50DA-D93849B89C43
export uuids ieee123_uuids.dat
//
cd /Users/mcde601/src/GRIDAPPSD/Powergrid-Models/taxonomy/
redirect ./new_R2_12_47_2/Master.dss
set maxiterations=20
solve
cd /Users/mcde601/src/GRIDAPPSD/Powergrid-Models/blazegraph/test/
export summary  R2_12_47_2_s.csv
export voltages R2_12_47_2_v.csv
export currents R2_12_47_2_i.csv
export taps     R2_12_47_2_t.csv
uuids r2_12_47_2_uuids.dat
export cim100 file=R2_12_47_2.xml subgeo=Taxonomy geo=PNNL fid=9CE150A8-8CC5-A0F9-B67E-BBD8C79D3095 sid=933D85C1-BE1C-4C05-D4DD-4B41D941C52C sgrid=656EE259-23FF-086E-1DC0-39CB9DC60A20 rgnid=79C9D814-3CE0-DC11-534D-BDA1AF949810
export uuids r2_12_47_2_uuids.dat
//
cd /Users/mcde601/src/GRIDAPPSD/Powergrid-Models/blazegraph/test/dss/EPRI/DPV/J1
redirect Master.dss
set maxiterations=20
solve
cd /Users/mcde601/src/GRIDAPPSD/Powergrid-Models/blazegraph/test/
export summary  EPRI_DPV_J1_s.csv
export voltages EPRI_DPV_J1_v.csv
export currents EPRI_DPV_J1_i.csv
export taps     EPRI_DPV_J1_t.csv
uuids epri_dpv_j1_uuids.dat
export cim100 file=EPRI_DPV_J1.xml sub=J1 subgeo=DPV geo=EPRI fid=67AB291F-DCCD-31B7-B499-338206B9828F sid=A3C31EE7-4EE6-A167-87C7-915B1C6E97F0 sgrid=096FDFB8-2692-D811-F483-553D578399F2 rgnid=9A1E61E4-5CF1-982B-C7EF-0918D26645C7
export uuids epri_dpv_j1_uuids.dat
//
cd /Users/mcde601/src/GRIDAPPSD/Powergrid-Models/blazegraph/test/dss/NREL
redirect IEEE123Master_fixedVR.dss
cd /Users/mcde601/src/GRIDAPPSD/Powergrid-Models/blazegraph/test/
export summary  IEEE123_PV_s.csv
export voltages IEEE123_PV_v.csv
export currents IEEE123_PV_i.csv
export taps     IEEE123_PV_t.csv
uuids ieee123_PV_uuids.dat
export cim100 file=IEEE123_PV.xml sub=IEEE123 subgeo=Medium geo=IEEE fid=E407CBB6-8C8D-9BC9-589C-AB83FBF0826D sid=FE44B314-385E-C2BF-3983-3A10C6060022 sgrid=1CD7D2EE-3C91-3248-5662-A43EFEFAC224 rgnid=73C512BD-7249-4F50-50DA-D93849B89C43
export uuids ieee123_PV_uuids.dat
//
cd /Users/mcde601/src/GRIDAPPSD/Powergrid-Models/blazegraph/test/dss/UAF
redirect ACEP_PSIL.dss
solve
cd /Users/mcde601/src/GRIDAPPSD/Powergrid-Models/blazegraph/test/
export summary  ACEP_PSIL_s.csv
export voltages ACEP_PSIL_v.csv
export currents ACEP_PSIL_i.csv
export taps     ACEP_PSIL_t.csv
uuids acep_psil_uuids.dat
export cim100 file=ACEP_PSIL.xml sub=UAF subgeo=Fairbanks geo=Alaska fid=77966920-E1EC-EE8A-23EE-4EFD23B205BD sid=22B12048-23DF-007B-9291-826A16DBCB21 sgrid=2F8FC9BF-FF32-A197-D541-0A2529D04DF7 rgnid=96465E7A-6EC3-ECCA-BC27-31B53F05C96E
export uuids acep_psil_uuids.dat
//
cd /Users/mcde601/src/GRIDAPPSD/Powergrid-Models/blazegraph/test/dss/WSU
redirect Master-bal-new.dss
solve
cd /Users/mcde601/src/GRIDAPPSD/Powergrid-Models/blazegraph/test/
export summary  IEEE8500_3subs_s.csv
export voltages IEEE8500_3subs_v.csv
export currents IEEE8500_3subs_i.csv
export taps     IEEE8500_3subs_t.csv
uuids ieee8500_3subs_uuids.dat
export cim100 file=IEEE8500_3subs.xml sub=ThreeSubs subgeo=Large geo=IEEE fid=AAE94E4A-2465-6F5E-37B1-3E72183A4E44 sid=40485321-9B2C-1B8C-EC33-39D2F7948163 sgrid=A1170111-942A-6ABD-D325-C64886DC4D7D rgnid=73C512BD-7249-4F50-50DA-D93849B89C43
export uuids ieee8500_3subs_uuids.dat
