//
cd /Users/mcde601/src/GRIDAPPSD/Powergrid-Models/blazegraph/test/dss/WSU
redirect Master-bal-new.dss
solve
cd /Users/mcde601/src/GRIDAPPSD/Powergrid-Models/blazegraph/test/
export summary  IEEE8500_3subs_s.csv
export voltages IEEE8500_3subs_v.csv
export currents IEEE8500_3subs_i.csv
export taps     IEEE8500_3subs_t.csv
uuids ieee8500_3subs_uuids.dat
export cim100 file=IEEE8500_3subs.xml sub=ThreeSubs subgeo=Large geo=IEEE fid=AAE94E4A-2465-6F5E-37B1-3E72183A4E44 sid=40485321-9B2C-1B8C-EC33-39D2F7948163 sgrid=A1170111-942A-6ABD-D325-C64886DC4D7D rgnid=73C512BD-7249-4F50-50DA-D93849B89C43
export uuids ieee8500_3subs_uuids.dat
