New	Transformer.Xfmr_AE191606_A	phases=1	buses=(0x008DDEB0.1,0x008DDEB0_s.1)	kvs=(7.2,0.24)	kvas=(25,25)	xhl=1.57	%loadloss=1.31292	%noloadloss=0.2492
New	Transformer.Xfmr_AE300103_A	phases=1	buses=(0x008DCBC8.1,0x008DCBC8_s.1)	kvs=(7.2,0.24)	kvas=(75,75)	xhl=1.84	%loadloss=0.836	%noloadloss=0.146666666666667
New	Transformer.Xfmr_AE300104_A	phases=1	buses=(0x008DD0F0.1,0x008DD0F0_s.1)	kvs=(7.2,0.24)	kvas=(75,75)	xhl=1.73	%loadloss=0.777764583333334	%noloadloss=0.16096875
New	Transformer.Xfmr_AE300105_C	phases=1	buses=(0x008E7F28.3,0x008E7F28_s.3)	kvs=(7.2,0.24)	kvas=(75,75)	xhl=1.54	%loadloss=0.707333333333333	%noloadloss=0.1852
New	Transformer.Xfmr_AE300106_C	phases=1	buses=(0x0089EBA0.3,0x0089EBA0_s.3)	kvs=(7.2,0.24)	kvas=(75,75)	xhl=1.83	%loadloss=0.801733333333333	%noloadloss=0.153866666666667
New	Transformer.Xfmr_AE300107_C	phases=1	buses=(0x0089F280.3,0x0089F280_s.3)	kvs=(7.2,0.24)	kvas=(75,75)	xhl=1.84	%loadloss=0.8248	%noloadloss=0.151333333333333
New	Transformer.Xfmr_AE300108_B	phases=1	buses=(0x008C7A18.2,0x008C7A18_s.2)	kvs=(7.2,0.24)	kvas=(75,75)	xhl=1.87	%loadloss=0.839066666666667	%noloadloss=0.1476
New	Transformer.Xfmr_AE300109_B	phases=1	buses=(0x008CA358.2,0x008CA358_s.2)	kvs=(7.2,0.24)	kvas=(50,50)	xhl=1.84	%loadloss=0.954	%noloadloss=0.186
New	Transformer.Xfmr_AE300110_A	phases=1	buses=(0x008CA6C8.1,0x008CA6C8_s.1)	kvs=(7.2,0.24)	kvas=(75,75)	xhl=1.84	%loadloss=0.806	%noloadloss=0.15
New	Transformer.Xfmr_AE300111_A	phases=1	buses=(0x008C9070.1,0x008C9070_s.1)	kvs=(7.2,0.24)	kvas=(75,75)	xhl=1.54	%loadloss=0.7	%noloadloss=0.189333333333333
New	Transformer.Xfmr_AE300114_C	phases=1	buses=(0x008DEE30.3,0x008DEE30_s.3)	kvs=(7.2,0.24)	kvas=(25,25)	xhl=2.04	%loadloss=1.304	%noloadloss=0.228
New	Transformer.Xfmr_AE300115_C	phases=1	buses=(0x008E8450.3,0x008E8450_s.3)	kvs=(7.2,0.24)	kvas=(50,50)	xhl=1.5	%loadloss=0.890680425531915	%noloadloss=0.185791063829787
New	Transformer.Xfmr_AE300116_C	phases=1	buses=(0x008C4D68.3,0x008C4D68_s.3)	kvs=(7.2,0.24)	kvas=(25,25)	xhl=2.03	%loadloss=1.256	%noloadloss=0.248
New	Transformer.Xfmr_AE300117_C	phases=1	buses=(0x008DF6C8.3,0x008DF6C8_s.3)	kvs=(7.2,0.24)	kvas=(75,75)	xhl=1.8	%loadloss=0.613333333333333	%noloadloss=0.182666666666667
New	Transformer.Xfmr_AE300118_C	phases=1	buses=(0x008E8978.3,0x008E8978_s.3)	kvs=(7.2,0.24)	kvas=(75,75)	xhl=1.82	%loadloss=0.82	%noloadloss=0.149333333333333
New	Transformer.Xfmr_AE300119_C	phases=1	buses=(0x008E87C0.3,0x008E87C0_s.3)	kvs=(7.2,0.24)	kvas=(75,75)	xhl=1.82	%loadloss=0.845333333333333	%noloadloss=0.149333333333333
New	Transformer.Xfmr_AE300120_C	phases=1	buses=(0x008DA5F0.3,0x008DA5F0_s.3)	kvs=(7.2,0.24)	kvas=(75,75)	xhl=1.6	%loadloss=0.777764583333334	%noloadloss=0.16096875
New	Transformer.Xfmr_AE300121_C	phases=1	buses=(0x008EA188.3,0x008EA188_s.3)	kvs=(7.2,0.24)	kvas=(50,50)	xhl=1.6	%loadloss=0.890680425531915	%noloadloss=0.185791063829787
New	Transformer.Xfmr_AE300122_A	phases=1	buses=(0x008E9E18.1,0x008E9E18_s.1)	kvs=(7.2,0.24)	kvas=(75,75)	xhl=1.85	%loadloss=0.8084	%noloadloss=0.150933333333333
New	Transformer.Xfmr_AE300123_A	phases=1	buses=(0x008DBC48.1,0x008DBC48_s.1)	kvs=(7.2,0.24)	kvas=(50,50)	xhl=1.9	%loadloss=0.962	%noloadloss=0.184
New	Transformer.Xfmr_AE300124_B	phases=1	buses=(0x008DFBF0.2,0x008DFBF0_s.2)	kvs=(7.2,0.24)	kvas=(75,75)	xhl=1.7	%loadloss=0.777764583333334	%noloadloss=0.16096875
New	Transformer.Xfmr_AE300125_B	phases=1	buses=(0x008D0398.2,0x008D0398_s.2)	kvs=(7.2,0.24)	kvas=(50,50)	xhl=1.88	%loadloss=0.94	%noloadloss=0.1888
New	Transformer.Xfmr_AE300134_A	phases=1	buses=(0x008C5290.1,0x008C5290_s.1)	kvs=(7.2,0.24)	kvas=(50,50)	xhl=1.96	%loadloss=0.964	%noloadloss=0.18
New	Transformer.Xfmr_AE300135_A	phases=1	buses=(0x008C4BB0.1,0x008C4BB0_s.1)	kvs=(7.2,0.24)	kvas=(75,75)	xhl=1.6	%loadloss=0.705866666666667	%noloadloss=0.1824
New	Transformer.Xfmr_AE300136_A	phases=1	buses=(0x008DBFB8.1,0x008DBFB8_s.1)	kvs=(7.2,0.24)	kvas=(50,50)	xhl=1.83	%loadloss=0.944	%noloadloss=0.1842
New	Transformer.Xfmr_AE300142_B	phases=1	buses=(0x0089DDE0.2,0x0089DDE0_s.2)	kvs=(7.2,0.24)	kvas=(75,75)	xhl=3.6	%loadloss=0.777764583333334	%noloadloss=0.16096875
New	Transformer.Xfmr_AE300143_B	phases=1	buses=(0x0089D700.2,0x0089D700_s.2)	kvs=(7.2,0.24)	kvas=(25,25)	xhl=1.6	%loadloss=1.18748666666667	%noloadloss=0.2502
New	Transformer.Xfmr_AE300144_B	phases=1	buses=(0x0089E4C0.2,0x0089E4C0_s.2)	kvs=(7.2,0.24)	kvas=(25,25)	xhl=1.6	%loadloss=0.936	%noloadloss=0.276
New	Transformer.Xfmr_AE300145_B	phases=1	buses=(0x008C5970.2,0x008C5970_s.2)	kvs=(7.2,0.24)	kvas=(75,75)	xhl=1.9	%loadloss=0.826933333333333	%noloadloss=0.152533333333333
New	Transformer.Xfmr_AE300146_B	phases=1	buses=(0x0089D020.2,0x0089D020_s.2)	kvs=(7.2,0.24)	kvas=(50,50)	xhl=1.85	%loadloss=0.9338	%noloadloss=0.1884
New	Transformer.Xfmr_AE300147_B	phases=1	buses=(0x008C2B70.2,0x008C2B70_s.2)	kvs=(7.2,0.24)	kvas=(75,75)	xhl=1.89	%loadloss=0.8372	%noloadloss=0.146533333333333
New	Transformer.Xfmr_AE300148_B	phases=1	buses=(0x008C2490.2,0x008C2490_s.2)	kvs=(7.2,0.24)	kvas=(75,75)	xhl=1.91	%loadloss=0.750133333333333	%noloadloss=0.1952
New	Transformer.Xfmr_AE300149_B	phases=1	buses=(0x0089BF70.2,0x0089BF70_s.2)	kvs=(7.2,0.24)	kvas=(75,75)	xhl=1.82	%loadloss=0.826666666666667	%noloadloss=0.156
New	Transformer.Xfmr_AE300150_B	phases=1	buses=(0x008C2648.2,0x008C2648_s.2)	kvs=(7.2,0.24)	kvas=(50,50)	xhl=1.87	%loadloss=0.95	%noloadloss=0.18
New	Transformer.Xfmr_AE300151_B	phases=1	buses=(0x008F3960.2,0x008F3960_s.2)	kvs=(7.2,0.24)	kvas=(50,50)	xhl=1.6	%loadloss=0.890680425531915	%noloadloss=0.185791063829787
New	Transformer.Xfmr_AE300152_B	phases=1	buses=(0x008C7338.2,0x008C7338_s.2)	kvs=(7.2,0.24)	kvas=(25,25)	xhl=1.5	%loadloss=0.928	%noloadloss=0.248
New	Transformer.Xfmr_AE300153_C	phases=1	buses=(0x0089C260.3,0x0089C260_s.3)	kvs=(7.2,0.24)	kvas=(75,75)	xhl=1.49	%loadloss=0.645333333333333	%noloadloss=0.186666666666667
New	Transformer.Xfmr_AE300154_C	phases=1	buses=(0x008E49E0.3,0x008E49E0_s.3)	kvs=(7.2,0.24)	kvas=(75,75)	xhl=1.7	%loadloss=0.777764583333334	%noloadloss=0.16096875
New	Transformer.Xfmr_AE300155_C	phases=1	buses=(0x0089C940.3,0x0089C940_s.3)	kvs=(7.2,0.24)	kvas=(50,50)	xhl=1.87	%loadloss=0.952	%noloadloss=0.184
New	Transformer.Xfmr_AE300199_A	phases=1	buses=(0x008B8108.1,0x008B8108_s.1)	kvs=(7.2,0.24)	kvas=(50,50)	xhl=2.9	%loadloss=1.18748666666667	%noloadloss=0.2502
New	Transformer.Xfmr_AE300199_C	phases=1	buses=(0x008B8108.3,0x008B8108_s.3)	kvs=(7.2,0.24)	kvas=(50,50)	xhl=2.9	%loadloss=1.18748666666667	%noloadloss=0.2502
New	Transformer.Xfmr_AE300202_A	phases=1	buses=(0x008E44B8.1,0x008E44B8_s.1)	kvs=(7.2,0.24)	kvas=(50,50)	xhl=1.92	%loadloss=0.9506	%noloadloss=0.1796
New	Transformer.Xfmr_AE300203_A	phases=1	buses=(0x008DB8D8.1,0x008DB8D8_s.1)	kvs=(7.2,0.24)	kvas=(75,75)	xhl=1.84	%loadloss=0.832	%noloadloss=0.144
New	Transformer.Xfmr_AE300204_A	phases=1	buses=(0x008D9678.1,0x008D9678_s.1)	kvs=(7.2,0.24)	kvas=(50,50)	xhl=1.88	%loadloss=0.9432	%noloadloss=0.1872
New	Transformer.Xfmr_AE300206_A	phases=1	buses=(0x008DD7D0.1,0x008DD7D0_s.1)	kvs=(7.2,0.24)	kvas=(50,50)	xhl=1.5	%loadloss=0.890680425531915	%noloadloss=0.185791063829787
New	Transformer.Xfmr_AE300207_A	phases=1	buses=(0x008D2618.1,0x008D2618_s.1)	kvs=(7.2,0.24)	kvas=(75,75)	xhl=1.73	%loadloss=0.741333333333333	%noloadloss=0.186666666666667
New	Transformer.Xfmr_AE300208_A	phases=1	buses=(0x008E74D8.1,0x008E74D8_s.1)	kvs=(7.2,0.24)	kvas=(75,75)	xhl=1.66	%loadloss=0.742666666666667	%noloadloss=0.188
New	Transformer.Xfmr_AE300209_A	phases=1	buses=(0x008E5278.1,0x008E5278_s.1)	kvs=(7.2,0.24)	kvas=(50,50)	xhl=1.5	%loadloss=0.890680425531915	%noloadloss=0.185791063829787
New	Transformer.Xfmr_AE300216_B	phases=1	buses=(0x008EDA38.2,0x008EDA38_s.2)	kvs=(7.2,0.24)	kvas=(75,75)	xhl=1.8	%loadloss=0.805733333333333	%noloadloss=0.153333333333333
New	Transformer.Xfmr_AE300217_B	phases=1	buses=(0x008D7DC8.2,0x008D7DC8_s.2)	kvs=(7.2,0.24)	kvas=(75,75)	xhl=1.84	%loadloss=0.8316	%noloadloss=0.150933333333333
New	Transformer.Xfmr_AE300225_C	phases=1	buses=(0x008DF1A0.3,0x008DF1A0_s.3)	kvs=(7.2,0.24)	kvas=(50,50)	xhl=1.83	%loadloss=0.946	%noloadloss=0.186
New	Transformer.Xfmr_AE300226_A	phases=1	buses=(0x008E8CE8.1,0x008E8CE8_s.1)	kvs=(7.2,0.24)	kvas=(75,75)	xhl=1.8	%loadloss=0.777764583333334	%noloadloss=0.16096875
New	Transformer.Xfmr_AE300227_A	phases=1	buses=(0x008E6560.1,0x008E6560_s.1)	kvs=(7.2,0.24)	kvas=(50,50)	xhl=1.97	%loadloss=0.9874	%noloadloss=0.1826
New	Transformer.Xfmr_AE300229_A	phases=1	buses=(0x008E7168.1,0x008E7168_s.1)	kvs=(7.2,0.24)	kvas=(75,75)	xhl=1.98	%loadloss=0.777764583333334	%noloadloss=0.16096875
New	Transformer.Xfmr_AE300234_A	phases=1	buses=(0x008E93C8.1,0x008E93C8_s.1)	kvs=(7.2,0.24)	kvas=(75,75)	xhl=1.57	%loadloss=0.825333333333333	%noloadloss=0.162666666666667
New	Transformer.Xfmr_AE300235_B	phases=1	buses=(0x008E7320.2,0x008E7320_s.2)	kvs=(7.2,0.24)	kvas=(50,50)	xhl=1.88	%loadloss=0.9614	%noloadloss=0.1774
New	Transformer.Xfmr_AE300236_B	phases=1	buses=(0x008E7848.2,0x008E7848_s.2)	kvs=(7.2,0.24)	kvas=(50,50)	xhl=1.77	%loadloss=1.1247	%noloadloss=0.19808
New	Transformer.Xfmr_AE300237_B	phases=1	buses=(0x008E4300.2,0x008E4300_s.2)	kvs=(7.2,0.24)	kvas=(75,75)	xhl=1.93	%loadloss=0.777764583333334	%noloadloss=0.16096875
New	Transformer.Xfmr_AE300238_B	phases=1	buses=(0x008E2750.2,0x008E2750_s.2)	kvs=(7.2,0.24)	kvas=(50,50)	xhl=1.87	%loadloss=0.9544	%noloadloss=0.1862
New	Transformer.Xfmr_AE300239_B	phases=1	buses=(0x008E2AC0.2,0x008E2AC0_s.2)	kvs=(7.2,0.24)	kvas=(50,50)	xhl=1.71	%loadloss=0.890680425531915	%noloadloss=0.185791063829787
New	Transformer.Xfmr_AE300240_C	phases=1	buses=(0x008EB998.3,0x008EB998_s.3)	kvs=(7.2,0.24)	kvas=(50,50)	xhl=1.86	%loadloss=0.939	%noloadloss=0.1854
New	Transformer.Xfmr_AE300241_C	phases=1	buses=(0x008EB2B8.3,0x008EB2B8_s.3)	kvs=(7.2,0.24)	kvas=(50,50)	xhl=1.6	%loadloss=0.890680425531915	%noloadloss=0.185791063829787
New	Transformer.Xfmr_AE300242_C	phases=1	buses=(0x008ED358.3,0x008ED358_s.3)	kvs=(7.2,0.24)	kvas=(50,50)	xhl=1.54	%loadloss=0.7088	%noloadloss=0.1836
New	Transformer.Xfmr_AE300243_C	phases=1	buses=(0x008E2FE8.3,0x008E2FE8_s.3)	kvs=(7.2,0.24)	kvas=(75,75)	xhl=1.6	%loadloss=0.777764583333334	%noloadloss=0.16096875
New	Transformer.Xfmr_AE300244_C	phases=1	buses=(0x008E3510.3,0x008E3510_s.3)	kvs=(7.2,0.24)	kvas=(50,50)	xhl=1.55	%loadloss=0.7142	%noloadloss=0.1926
New	Transformer.Xfmr_AE300245_C	phases=1	buses=(0x008E68D0.3,0x008E68D0_s.3)	kvs=(7.2,0.24)	kvas=(50,50)	xhl=1.57	%loadloss=0.7608	%noloadloss=0.191
New	Transformer.Xfmr_AE300253_B	phases=1	buses=(0x008E9C60.2,0x008E9C60_s.2)	kvs=(7.2,0.24)	kvas=(50,50)	xhl=1.6	%loadloss=0.890680425531915	%noloadloss=0.185791063829787
New	Transformer.Xfmr_AE300253_C	phases=1	buses=(0x008E9C60.3,0x008E9C60_s.3)	kvs=(7.2,0.24)	kvas=(50,50)	xhl=1.6	%loadloss=0.890680425531915	%noloadloss=0.185791063829787
New	Transformer.Xfmr_AE300255_B	phases=1	buses=(0x008DF510.2,0x008DF510_s.2)	kvs=(7.2,0.24)	kvas=(38,38)	xhl=1.9	%loadloss=0.890680425531915	%noloadloss=0.185791063829787
New	Transformer.Xfmr_AE300255_C	phases=1	buses=(0x008DF510.3,0x008DF510_s.3)	kvs=(7.2,0.24)	kvas=(38,38)	xhl=1.9	%loadloss=0.890680425531915	%noloadloss=0.185791063829787
New	Transformer.Xfmr_AE300257_A	phases=1	buses=(0x008E7D70.1,0x008E7D70_s.1)	kvs=(7.2,0.12)	kvas=(25,25)	xhl=2.1	%loadloss=1.18748666666667	%noloadloss=0.2502
New	Transformer.Xfmr_AE300257_B	phases=1	buses=(0x008E7D70.2,0x008E7D70_s.2)	kvs=(7.2,0.12)	kvas=(25,25)	xhl=2.1	%loadloss=1.18748666666667	%noloadloss=0.2502
New	Transformer.Xfmr_AE300257_C	phases=1	buses=(0x008E7D70.3,0x008E7D70_s.3)	kvs=(7.2,0.12)	kvas=(25,25)	xhl=2.1	%loadloss=1.18748666666667	%noloadloss=0.2502
New	Transformer.Xfmr_AE300701_A	phases=1	buses=(0x008CE818.1,0x008CE818_s.1)	kvs=(7.2,0.24)	kvas=(75,75)	xhl=1.77	%loadloss=0.748	%noloadloss=0.172
New	Transformer.Xfmr_AE300702_B	phases=1	buses=(0x008D3AC0.2,0x008D3AC0_s.2)	kvs=(7.2,0.24)	kvas=(75,75)	xhl=1.59	%loadloss=0.708533333333333	%noloadloss=0.187066666666667
New	Transformer.Xfmr_AE300703_B	phases=1	buses=(0x008CD8A0.2,0x008CD8A0_s.2)	kvs=(7.2,0.24)	kvas=(75,75)	xhl=3.1	%loadloss=0.777764583333334	%noloadloss=0.16096875
New	Transformer.Xfmr_AE300704_B	phases=1	buses=(0x008DE598.2,0x008DE598_s.2)	kvs=(7.2,0.24)	kvas=(75,75)	xhl=1.87	%loadloss=0.827866666666667	%noloadloss=0.152133333333333
New	Transformer.Xfmr_AE300705_B	phases=1	buses=(0x008D3598.2,0x008D3598_s.2)	kvs=(7.2,0.24)	kvas=(75,75)	xhl=1.65	%loadloss=0.770666666666667	%noloadloss=0.181333333333333
New	Transformer.Xfmr_AE300706_B	phases=1	buses=(0x008D33E0.2,0x008D33E0_s.2)	kvs=(7.2,0.24)	kvas=(75,75)	xhl=1.83	%loadloss=0.834666666666667	%noloadloss=0.150666666666667
New	Transformer.Xfmr_AE300707_B	phases=1	buses=(0x008D4510.2,0x008D4510_s.2)	kvs=(7.2,0.24)	kvas=(50,50)	xhl=1.9	%loadloss=0.962	%noloadloss=0.18
New	Transformer.Xfmr_AE300710_C	phases=1	buses=(0x008D4880.3,0x008D4880_s.3)	kvs=(7.2,0.24)	kvas=(75,75)	xhl=1.6	%loadloss=0.711866666666667	%noloadloss=0.188666666666667
New	Transformer.Xfmr_AE300711_C	phases=1	buses=(0x008D4F60.3,0x008D4F60_s.3)	kvs=(7.2,0.24)	kvas=(75,75)	xhl=2.2	%loadloss=0.777764583333334	%noloadloss=0.16096875
New	Transformer.Xfmr_AE300712_C	phases=1	buses=(0x008D5D20.3,0x008D5D20_s.3)	kvs=(7.2,0.24)	kvas=(75,75)	xhl=1.6	%loadloss=0.585333333333333	%noloadloss=0.202666666666667
New	Transformer.Xfmr_AE300713_C	phases=1	buses=(0x008D6400.3,0x008D6400_s.3)	kvs=(7.2,0.24)	kvas=(75,75)	xhl=1.7	%loadloss=0.581333333333333	%noloadloss=0.198666666666667
New	Transformer.Xfmr_AE300714_C	phases=1	buses=(0x008D5488.3,0x008D5488_s.3)	kvs=(7.2,0.24)	kvas=(50,50)	xhl=1.67	%loadloss=0.606	%noloadloss=0.206
New	Transformer.Xfmr_AE300715_C	phases=1	buses=(0x008D4BF0.3,0x008D4BF0_s.3)	kvs=(7.2,0.24)	kvas=(75,75)	xhl=1.54	%loadloss=0.525333333333333	%noloadloss=0.209333333333333
New	Transformer.Xfmr_AE300808_B	phases=1	buses=(0x008D0DE8.2,0x008D0DE8_s.2)	kvs=(7.2,0.24)	kvas=(50,50)	xhl=1.3	%loadloss=0.890680425531915	%noloadloss=0.185791063829787
New	Transformer.Xfmr_AE300809_B	phases=1	buses=(0x008CCE50.2,0x008CCE50_s.2)	kvs=(7.2,0.24)	kvas=(50,50)	xhl=1.86	%loadloss=0.9472	%noloadloss=0.1828
New	Transformer.Xfmr_AE300810_B	phases=1	buses=(0x008D3E30.2,0x008D3E30_s.2)	kvs=(7.2,0.24)	kvas=(75,75)	xhl=1.84	%loadloss=0.821333333333333	%noloadloss=0.146666666666667
New	Transformer.Xfmr_AE300811_B	phases=1	buses=(0x008D14E8.2,0x008D14E8_s.2)	kvs=(7.2,0.24)	kvas=(75,75)	xhl=1.6	%loadloss=0.777764583333334	%noloadloss=0.16096875
New	Transformer.Xfmr_AE300812_B	phases=1	buses=(0x008D1F38.2,0x008D1F38_s.2)	kvs=(7.2,0.24)	kvas=(75,75)	xhl=1.3	%loadloss=0.777764583333334	%noloadloss=0.16096875
New	Transformer.Xfmr_AE300813_B	phases=1	buses=(0x008DD618.2,0x008DD618_s.2)	kvs=(7.2,0.24)	kvas=(75,75)	xhl=1.8	%loadloss=0.777764583333334	%noloadloss=0.16096875
New	Transformer.Xfmr_AE300814_A	phases=1	buses=(0x008DFF60.1,0x008DFF60_s.1)	kvs=(7.2,0.24)	kvas=(50,50)	xhl=1.3	%loadloss=0.890680425531915	%noloadloss=0.185791063829787
New	Transformer.Xfmr_AE300815_B	phases=1	buses=(0x008EE520.2,0x008EE520_s.2)	kvs=(7.2,0.24)	kvas=(38,38)	xhl=1.5	%loadloss=0.890680425531915	%noloadloss=0.185791063829787
New	Transformer.Xfmr_AE300817_B	phases=1	buses=(0x008CB488.2,0x008CB488_s.2)	kvs=(7.2,0.24)	kvas=(75,75)	xhl=1.82	%loadloss=0.818666666666667	%noloadloss=0.1544
New	Transformer.Xfmr_AE300818_B	phases=1	buses=(0x008C8990.2,0x008C8990_s.2)	kvs=(7.2,0.24)	kvas=(75,75)	xhl=1.88	%loadloss=0.836133333333334	%noloadloss=0.156533333333333
New	Transformer.Xfmr_AE300819_A	phases=1	buses=(0x008CADA8.1,0x008CADA8_s.1)	kvs=(7.2,0.24)	kvas=(75,75)	xhl=1.86	%loadloss=0.8268	%noloadloss=0.155066666666667
New	Transformer.Xfmr_AE300820_A	phases=1	buses=(0x008DC858.1,0x008DC858_s.1)	kvs=(7.2,0.24)	kvas=(75,75)	xhl=3.21	%loadloss=0.942	%noloadloss=0.0430666666666667
New	Transformer.Xfmr_AE300821_A	phases=1	buses=(0x008D0708.1,0x008D0708_s.1)	kvs=(7.2,0.24)	kvas=(75,75)	xhl=2.26	%loadloss=0.898133333333333	%noloadloss=0.1548
New	Transformer.Xfmr_AE300822_A	phases=1	buses=(0x008E8B30.1,0x008E8B30_s.1)	kvs=(7.2,0.24)	kvas=(75,75)	xhl=1.57	%loadloss=0.707333333333333	%noloadloss=0.185733333333333
New	Transformer.Xfmr_AE300823_C	phases=1	buses=(0x008C7860.3,0x008C7860_s.3)	kvs=(7.2,0.24)	kvas=(75,75)	xhl=1.49	%loadloss=0.610666666666667	%noloadloss=0.201333333333333
New	Transformer.Xfmr_AE300825_B	phases=1	buses=(0x008CC090.2,0x008CC090_s.2)	kvs=(7.2,0.24)	kvas=(50,50)	xhl=1.87	%loadloss=0.9586	%noloadloss=0.1782
New	Transformer.Xfmr_AE300826_B	phases=1	buses=(0x008CD530.2,0x008CD530_s.2)	kvs=(7.2,0.24)	kvas=(75,75)	xhl=1.85	%loadloss=0.812	%noloadloss=0.145333333333333
New	Transformer.Xfmr_AE300827_B	phases=1	buses=(0x008CDC10.2,0x008CDC10_s.2)	kvs=(7.2,0.24)	kvas=(75,75)	xhl=1.84	%loadloss=0.816	%noloadloss=0.152
New	Transformer.Xfmr_AE300828_B	phases=1	buses=(0x008CE138.2,0x008CE138_s.2)	kvs=(7.2,0.24)	kvas=(50,50)	xhl=1.8	%loadloss=0.890680425531915	%noloadloss=0.185791063829787
New	Transformer.Xfmr_AE300829_B	phases=1	buses=(0x008DA7A8.2,0x008DA7A8_s.2)	kvs=(7.2,0.24)	kvas=(50,50)	xhl=1.83	%loadloss=0.9566	%noloadloss=0.1958
New	Transformer.Xfmr_AE300830_B	phases=1	buses=(0x008D01E0.2,0x008D01E0_s.2)	kvs=(7.2,0.24)	kvas=(50,50)	xhl=1.85	%loadloss=0.9404	%noloadloss=0.1848
New	Transformer.Xfmr_AE300831_C	phases=1	buses=(0x008CB9B0.3,0x008CB9B0_s.3)	kvs=(7.2,0.24)	kvas=(50,50)	xhl=1.68	%loadloss=0.654	%noloadloss=0.216
New	Transformer.Xfmr_AE300832_C	phases=1	buses=(0x008CC770.3,0x008CC770_s.3)	kvs=(7.2,0.24)	kvas=(75,75)	xhl=1.82	%loadloss=0.822666666666667	%noloadloss=0.148
New	Transformer.Xfmr_AE300833_C	phases=1	buses=(0x008CF0B0.3,0x008CF0B0_s.3)	kvs=(7.2,0.24)	kvas=(75,75)	xhl=1.8	%loadloss=0.777764583333334	%noloadloss=0.16096875
New	Transformer.Xfmr_AE300834_C	phases=1	buses=(0x008C50D8.3,0x008C50D8_s.3)	kvs=(7.2,0.24)	kvas=(50,50)	xhl=1.92	%loadloss=0.966	%noloadloss=0.186
New	Transformer.Xfmr_AE300835_C	phases=1	buses=(0x008CF790.3,0x008CF790_s.3)	kvs=(7.2,0.24)	kvas=(50,50)	xhl=1.62	%loadloss=0.6696	%noloadloss=0.2108
New	Transformer.Xfmr_AE300836_C	phases=1	buses=(0x008CFE70.3,0x008CFE70_s.3)	kvs=(7.2,0.24)	kvas=(50,50)	xhl=1.8	%loadloss=0.890680425531915	%noloadloss=0.185791063829787
New	Transformer.Xfmr_AE300901_A	phases=1	buses=(0x008C6FC8.1,0x008C6FC8_s.1)	kvs=(7.2,0.24)	kvas=(75,75)	xhl=1.6	%loadloss=0.777764583333334	%noloadloss=0.16096875
New	Transformer.Xfmr_AE300902_A	phases=1	buses=(0x008C8EB8.1,0x008C8EB8_s.1)	kvs=(7.2,0.24)	kvas=(75,75)	xhl=1.85	%loadloss=0.818666666666667	%noloadloss=0.152
New	Transformer.Xfmr_AE300903_B	phases=1	buses=(0x008F2830.2,0x008F2830_s.2)	kvs=(7.2,0.24)	kvas=(100,100)	xhl=1.82	%loadloss=0.679	%noloadloss=0.171
New	Transformer.Xfmr_AE300904_B	phases=1	buses=(0x008D1330.2,0x008D1330_s.2)	kvs=(7.2,0.24)	kvas=(75,75)	xhl=1.7	%loadloss=0.777764583333334	%noloadloss=0.16096875
New	Transformer.Xfmr_AE300905_B	phases=1	buses=(0x008D8660.2,0x008D8660_s.2)	kvs=(7.2,0.24)	kvas=(75,75)	xhl=1.69	%loadloss=0.745333333333333	%noloadloss=0.174666666666667
New	Transformer.Xfmr_AE300906_B	phases=1	buses=(0x008D4358.2,0x008D4358_s.2)	kvs=(7.2,0.24)	kvas=(75,75)	xhl=1.57	%loadloss=0.648	%noloadloss=0.197333333333333
New	Transformer.Xfmr_AE300907_B	phases=1	buses=(0x008D1BC8.2,0x008D1BC8_s.2)	kvs=(7.2,0.24)	kvas=(75,75)	xhl=1.72	%loadloss=0.761333333333333	%noloadloss=0.182666666666667
New	Transformer.Xfmr_AE300908_B	phases=1	buses=(0x008D6AE0.2,0x008D6AE0_s.2)	kvs=(7.2,0.24)	kvas=(75,75)	xhl=1.65	%loadloss=0.752	%noloadloss=0.177333333333333
New	Transformer.Xfmr_AE300911_C	phases=1	buses=(0x008D41A0.3,0x008D41A0_s.3)	kvs=(7.2,0.24)	kvas=(75,75)	xhl=1.68	%loadloss=0.761333333333333	%noloadloss=0.170666666666667
New	Transformer.Xfmr_AE300912_C	phases=1	buses=(0x008EAA20.3,0x008EAA20_s.3)	kvs=(7.2,0.24)	kvas=(75,75)	xhl=1.87	%loadloss=0.851733333333333	%noloadloss=0.149733333333333
New	Transformer.Xfmr_AE300913_C	phases=1	buses=(0x008D3228.3,0x008D3228_s.3)	kvs=(7.2,0.24)	kvas=(50,50)	xhl=1.86	%loadloss=0.9628	%noloadloss=0.1786
New	Transformer.Xfmr_AE300914_A	phases=1	buses=(0x008CE2F0.1,0x008CE2F0_s.1)	kvs=(7.2,0.24)	kvas=(75,75)	xhl=1.64	%loadloss=0.770666666666667	%noloadloss=0.173333333333333
New	Transformer.Xfmr_AE300915_A	phases=1	buses=(0x008C8B48.1,0x008C8B48_s.1)	kvs=(7.2,0.24)	kvas=(75,75)	xhl=1.85	%loadloss=0.809333333333333	%noloadloss=0.1488
New	Transformer.Xfmr_AE300916_A	phases=1	buses=(0x008CF5D8.1,0x008CF5D8_s.1)	kvs=(7.2,0.24)	kvas=(75,75)	xhl=1.66	%loadloss=0.753333333333333	%noloadloss=0.172
New	Transformer.Xfmr_AE300917_A	phases=1	buses=(0x008DC4E8.1,0x008DC4E8_s.1)	kvs=(7.2,0.24)	kvas=(75,75)	xhl=1.67	%loadloss=0.752	%noloadloss=0.176
New	Transformer.Xfmr_AE300918_A	phases=1	buses=(0x008D2460.1,0x008D2460_s.1)	kvs=(7.2,0.24)	kvas=(75,75)	xhl=3.2	%loadloss=0.953466666666667	%noloadloss=0.0450666666666667
New	Transformer.Xfmr_AE300919_A	phases=1	buses=(0x008D5ED8.1,0x008D5ED8_s.1)	kvs=(7.2,0.24)	kvas=(50,50)	xhl=1.77	%loadloss=1.12942	%noloadloss=0.18444
New	Transformer.Xfmr_AE300920_A	phases=1	buses=(0x008CD6E8.1,0x008CD6E8_s.1)	kvs=(7.2,0.24)	kvas=(75,75)	xhl=3.21	%loadloss=0.937466666666667	%noloadloss=0.042
New	Transformer.Xfmr_AE300921_B	phases=1	buses=(0x008B8D10.2,0x008B8D10_s.2)	kvs=(7.2,0.24)	kvas=(50,50)	xhl=1.78	%loadloss=1.10798	%noloadloss=0.19434
New	Transformer.Xfmr_AE300922_B	phases=1	buses=(0x008EB470.2,0x008EB470_s.2)	kvs=(7.2,0.24)	kvas=(50,50)	xhl=1.78	%loadloss=0.9256	%noloadloss=0.1784
New	Transformer.Xfmr_AE300923_B	phases=1	buses=(0x008D5118.2,0x008D5118_s.2)	kvs=(7.2,0.24)	kvas=(50,50)	xhl=1.69	%loadloss=0.9829	%noloadloss=0.20862
New	Transformer.Xfmr_AE301003_C	phases=1	buses=(0x008D82F0.3,0x008D82F0_s.3)	kvs=(7.2,0.24)	kvas=(75,75)	xhl=1.7	%loadloss=0.777764583333334	%noloadloss=0.16096875
New	Transformer.Xfmr_AE301004_C	phases=1	buses=(0x00899528.3,0x00899528_s.3)	kvs=(7.2,0.24)	kvas=(75,75)	xhl=1.9	%loadloss=0.835333333333333	%noloadloss=0.150133333333333
New	Transformer.Xfmr_AE301005_C	phases=1	buses=(0x008D6C98.3,0x008D6C98_s.3)	kvs=(7.2,0.24)	kvas=(50,50)	xhl=1.61	%loadloss=0.678	%noloadloss=0.222
New	Transformer.Xfmr_AE301006_C	phases=1	buses=(0x008D7008.3,0x008D7008_s.3)	kvs=(7.2,0.24)	kvas=(50,50)	xhl=1.6	%loadloss=0.890680425531915	%noloadloss=0.185791063829787
New	Transformer.Xfmr_AE301007_C	phases=1	buses=(0x008C93E0.3,0x008C93E0_s.3)	kvs=(7.2,0.24)	kvas=(50,50)	xhl=1.62	%loadloss=0.72	%noloadloss=0.198
New	Transformer.Xfmr_AE301008_C	phases=1	buses=(0x008D8D40.3,0x008D8D40_s.3)	kvs=(7.2,0.24)	kvas=(75,75)	xhl=1.84	%loadloss=0.8476	%noloadloss=0.1564
New	Transformer.Xfmr_AE301009_C	phases=1	buses=(0x008D78A0.3,0x008D78A0_s.3)	kvs=(7.2,0.24)	kvas=(75,75)	xhl=1.7	%loadloss=0.777764583333334	%noloadloss=0.16096875
New	Transformer.Xfmr_AE301010_C	phases=1	buses=(0x008D7C10.3,0x008D7C10_s.3)	kvs=(7.2,0.24)	kvas=(75,75)	xhl=1.61	%loadloss=0.7332	%noloadloss=0.178666666666667
New	Transformer.Xfmr_AE301011_C	phases=1	buses=(0x008EB7E0.3,0x008EB7E0_s.3)	kvs=(7.2,0.24)	kvas=(50,50)	xhl=1.61	%loadloss=0.7192	%noloadloss=0.1914
New	Transformer.Xfmr_AE301016_A	phases=1	buses=(0x008D8138.1,0x008D8138_s.1)	kvs=(7.2,0.24)	kvas=(50,50)	xhl=1.9	%loadloss=0.9604	%noloadloss=0.1836
New	Transformer.Xfmr_AE301017_A	phases=1	buses=(0x008D89D0.1,0x008D89D0_s.1)	kvs=(7.2,0.24)	kvas=(75,75)	xhl=1.85	%loadloss=0.822933333333334	%noloadloss=0.1484
New	Transformer.Xfmr_AE301018_A	phases=1	buses=(0x008DEC78.1,0x008DEC78_s.1)	kvs=(7.2,0.24)	kvas=(75,75)	xhl=1.9	%loadloss=0.811733333333333	%noloadloss=0.1488
New	Transformer.Xfmr_AE301019_A	phases=1	buses=(0x008996E0.1,0x008996E0_s.1)	kvs=(7.2,0.24)	kvas=(50,50)	xhl=1.66	%loadloss=0.928	%noloadloss=0.172
New	Transformer.Xfmr_AE301020_A	phases=1	buses=(0x008D9830.1,0x008D9830_s.1)	kvs=(7.2,0.24)	kvas=(50,50)	xhl=1.67	%loadloss=0.890680425531915	%noloadloss=0.185791063829787
New	Transformer.Xfmr_AE301021_A	phases=1	buses=(0x008D9BA0.1,0x008D9BA0_s.1)	kvs=(7.2,0.24)	kvas=(50,50)	xhl=1.66	%loadloss=0.91	%noloadloss=0.172
New	Transformer.Xfmr_AE301022_C	phases=1	buses=(0x008D08C0.3,0x008D08C0_s.3)	kvs=(7.2,0.24)	kvas=(50,50)	xhl=1.53	%loadloss=0.72	%noloadloss=0.1808
New	Transformer.Xfmr_AE301517_C	phases=1	buses=(0x008DA438.3,0x008DA438_s.3)	kvs=(7.2,0.24)	kvas=(50,50)	xhl=1.77	%loadloss=1.14838	%noloadloss=0.1899
New	Transformer.Xfmr_AE301518_C	phases=1	buses=(0x008DA960.3,0x008DA960_s.3)	kvs=(7.2,0.24)	kvas=(50,50)	xhl=1.64	%loadloss=0.6738	%noloadloss=0.181
New	Transformer.Xfmr_AE301519_C	phases=1	buses=(0x008DACD0.3,0x008DACD0_s.3)	kvs=(7.2,0.24)	kvas=(75,75)	xhl=1.49	%loadloss=0.650666666666667	%noloadloss=0.193333333333333
New	Transformer.Xfmr_AE301520_A	phases=1	buses=(0x008DB568.1,0x008DB568_s.1)	kvs=(7.2,0.24)	kvas=(50,50)	xhl=1.63	%loadloss=0.674	%noloadloss=0.2016
New	Transformer.Xfmr_AE301521_A	phases=1	buses=(0x008DB040.1,0x008DB040_s.1)	kvs=(7.2,0.24)	kvas=(50,50)	xhl=1.86	%loadloss=0.936	%noloadloss=0.188

New	Transformer.Xfmr_AE300247	phases=3	buses=(0x008E6FB0,0x008E6FB0_s)	kvs=(12.47,0.208)	kvas=(225,225)	xhl=4.8	%loadloss=0.757666666666667	%noloadloss=0.190566666666667
New	Transformer.Xfmr_AE300250	phases=3	buses=(0x008E7A00,0x008E7A00_s)	kvs=(12.47,0.208)	kvas=(150,150)	xhl=2.09	%loadloss=0.878733333333333	%noloadloss=0.202066666666667
New	Transformer.Xfmr_AE300322	phases=3	buses=(0x0089E678,0x0089E678_s)	kvs=(12.47,0.208)	kvas=(300,300)	xhl=4.46	%loadloss=0.6366	%noloadloss=0.179066666666667
New	Transformer.Xfmr_AE301090	phases=3	buses=(0x008D3070,0x008D3070_s)	kvs=(12.47,0.48)	kvas=(750,750)	xhl=6.01	%loadloss=0.6524	%noloadloss=0.108133333333333
