clear
cd /home/tom/src/Powergrid-Models/platform/both/
redirect IEEE8500_base.dss
set maxiterations=80
set controlmode=off
solve
cd /home/tom/src/Powergrid-Models/platform/test/dss/
export summary   IEEE8500_s.csv
export voltages  IEEE8500_v.csv
export currents  IEEE8500_i.csv
export taps      IEEE8500_t.csv
export nodeorder IEEE8500_n.csv
//
