redirect ACEP_PSIL.dss
set maxiterations=80
solve
cd /src/Powergrid-Models/platform/cimxml
uuids acep_psil_uuids.dat
export cim100 file=ACEP_PSIL.xml sub=UAF subgeo=Fairbanks geo=Alaska fid=77966920-E1EC-EE8A-23EE-4EFD23B205BD sid=22B12048-23DF-007B-9291-826A16DBCB21 sgrid=2F8FC9BF-FF32-A197-D541-0A2529D04DF7 rgnid=96465E7A-6EC3-ECCA-BC27-31B53F05C96E
export uuids acep_psil_uuids.dat
